*Heading
 gmsh_test_12.inp
*NODE
1, 3, 3, 3
2, -3, 3, 3
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******* E L E M E N T S *************
*ELEMENT, type=CPS4, ELSET=Surface1201
9, 1, 9, 66, 50
10, 9, 10, 49, 66
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*ELEMENT, type=CPS4, ELSET=Surface1204
51, 34, 106, 123, 33
52, 106, 104, 107, 123
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*ELEMENT, type=C3D8, ELSET=Volume1301
93, 47, 159, 184, 160, 161, 185, 187, 186
94, 159, 102, 115, 184, 185, 119, 132, 187
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*ELSET,ELSET=TABLE_TOP
9, 10, 11, 12, 13, 14
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*ELSET,ELSET=LEG_BOTTOMS
51, 52, 53, 54, 55, 56
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*ELSET,ELSET=VOLUME
93, 94, 95, 96, 97, 98
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*NSET,NSET=NODES
1, 2, 3, 4, 5, 6, 7, 8,
*NSET,NSET=TABLE_TOP
1, 2, 3, 5, 9, 10
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*NSET,NSET=LEG_BOTTOMS
4, 6, 7, 8, 33, 34
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*NSET,NSET=VOLUME
1, 2, 3, 4, 5, 6
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
*MATERIAL, NAME=TableMaterial
*ELASTIC, TYPE=ISO
30000, 0.3

*SOLID SECTION,MATERIAL=TableMaterial,ELSET=VOLUME

*BOUNDARY, FIXED
LEG_BOTTOMS,1,3

*STEP
*STATIC

*DLOAD
TABLE_TOP, P1, -100

*END STEP
